# OpenSim document version 30000
Model Mass-Muscle:
  length_units: meters
  force_units: N
  gravity: 0 -9.80665 0
  credits:
    Frank Anderson, Peter Loan, Ayman Habib, Ajay Seth, Michael Sherman
  BodySet:
    Body ground: mass=0 mass_center=(0 0 0) inertia_xx=1 inertia_yy=1 inertia_zz=1 meshes=anchor1.vtp
    Body Mass: mass=20 mass_center=(0 0 0) inertia_xx=1 inertia_yy=1 inertia_zz=1 meshes=block.vtp
      FreeJoint massToGround: parent_body=ground location_in_parent=(0 -0.5 0) location=(0 0 0)
        Coordinate massToGround_xRotation: motion_type=rotational range=(-1.570796 1.570796)
        Coordinate massToGround_yRotation: motion_type=rotational range=(-1.570796 1.570796)
        Coordinate massToGround_zRotation: motion_type=rotational range=(-1.570796 1.570796)
        Coordinate massToGround_xTranslation: motion_type=translational range=(-2 2)
        Coordinate massToGround_yTranslation: motion_type=translational range=(-2 2)
        Coordinate massToGround_zTranslation: motion_type=translational range=(-2 2)
  ForceSet:
    Thelen2003Muscle muscle: min_control=0 max_control=1 max_isometric_force=1000 optimal_fiber_length=0.25
        tendon_slack_length=0.1 pennation_angle_at_optimal=0 [radians]
      PathPoint point1: ground (0 0 0)
      PathPoint muscle1-point2: Mass (0 0 0)
  ControllerSet Controllers:
    PrescribedController LinearRamp Controller: actuator_list=muscle
      FunctionSet ControlFunctions: LinearFunction(coefficients=-0.333333 1)
